#------------------------------------------------------------------------
units metal
dimension 3
boundary p p p
atom_style atomic
#------------------------------------------------------------------------
# 1NN-MEAM
pair_style meam
pair_coeff * * library.meam Au Ge AuGe.meam Au Ge
#------------------------------------------------------------------------
# Y. Wang et al., Modelling Simul. Mater. Sci. Eng. 25 (2017) 025004.: doi:10.1088/1361-651X/aa5260
#------------------------------------------------------------------------
