#------------------------------------------------------------------------
units metal
dimension 3
boundary p p p
atom_style atomic
#------------------------------------------------------------------------
# 2NN-MEAM
pair_style meam
pair_coeff * * library.meam Au Ti AuTi.meam Au Ti
#------------------------------------------------------------------------
# W.-S. Ko et al., Int. J. Mech. Sci. 227 (2022) 107467.: https://doi.org/10.1016/j.ijmecsci.2022.107467
#------------------------------------------------------------------------
