#------------------------------------------------------------------------
units metal
dimension 3
boundary p p p
atom_style atomic
#------------------------------------------------------------------------
# 2NN-MEAM
pair_style meam
pair_coeff * * library.meam Cu Pt CuPt.meam Cu Pt
#------------------------------------------------------------------------
# J.-S. Kim et al., Calphad, 59 (2017) 131-141.: https://doi.org/10.1016/j.calphad.2017.09.005
# 2017--Kim-J-S-Seol-D-Ji-J-et-al--Cu-Pt
#------------------------------------------------------------------------
