#------------------------------------------------------------------------
units metal
dimension 3
boundary p p p
atom_style atomic
#------------------------------------------------------------------------
# 2NN-MEAM
pair_style meam
pair_coeff * * library.meam Fe Co FeCo.meam Fe Co
#------------------------------------------------------------------------
# M. Muralles et al., J. Mater. Res. Tech. 19 (2022) 1102-1110.: https://doi.org/10.1016/j.jmrt.2022.05.100
#------------------------------------------------------------------------
