#------------------------------------------------------------------------
units metal
dimension 3
boundary p p p
atom_style atomic
#------------------------------------------------------------------------
# 2NN-MEAM
pair_style meam
pair_coeff * * library.meam Fe Ti N FeTiN.meam Fe Ti N
#------------------------------------------------------------------------
# H.-K. Kim et al., Acta Materialia, 57(11), 3140-3147.: https://doi.org/10.1016/j.actamat.2009.03.019
# Home of 2NN MEAM Interatomic Potential
# C(i-k-j) = C(i,j,k) and C(i,j,k) = C(j,i,k)
# [15] B.-J. Lee et al., Acta Mater. 54 (2006) 4597-4607.: https://doi.org/10.1016/j.actamat.2006.06.003
# [16] B.-J. Lee, Acta Mater. 54 (2006) 701-711.: https://doi.org/10.1016/j.actamat.2005.09.034
# [17] Y.-M. Kim et al., Acta Mater. 56 (2008) 3481-3489.: https://doi.org/10.1016/j.actamat.2008.03.027
# [18] I. Sa et al., Scripta Mater. 59 (2008) 595-598.: https://doi.org/10.1016/j.scriptamat.2008.05.007

# Note: Cmin and Cmax were opposite to those in the paper (Assumption calculations), so they were corrected.
#------------------------------------------------------------------------
