#------------------------------------------------------------------------
units metal
dimension 3
boundary p p p
atom_style atomic
#------------------------------------------------------------------------
# 2NN-MEAM
pair_style meam
pair_coeff * * library.meam Nb Mo Ta W V NbMoTaWV.meam Nb Mo Ta W V
#------------------------------------------------------------------------
# S.-P. Ju et al., Sci Rep 12, 5183 (2022).: https://doi.org/10.1038/s41598-022-09203-y (Open Access)
#------------------------------------------------------------------------
