#------------------------------------------------------------------------
units metal
dimension 3
boundary p p p
atom_style atomic
#------------------------------------------------------------------------
# 2NN-MEAM
pair_style meam
pair_coeff * * library.meam Nb Ni Ti NbNiTi.meam Nb Ni Ti
#------------------------------------------------------------------------
# Nb-Ni-Ti: J. S. Lee et al., arXiv:2202.09586 (2022).: https://doi.org/10.1016/j.actamat.2022.117764
#------------------------------------------------------------------------
