#------------------------------------------------------------------------
units metal
dimension 3
boundary p p p
atom_style atomic
#------------------------------------------------------------------------
# 1NN-MEAM
pair_style meam
pair_coeff * * library.meam Pt Sn PtSn.meam Pt Sn
#------------------------------------------------------------------------
# H. Liu et al. J. Nano Res. 12 (2010) 131-138.: https://doi.org/10.4028/www.scientific.net/JNanoR.12.131
#------------------------------------------------------------------------
