### 4.2 Creations of Cu-Ni thin films & Indentation Procedures
# While creating Cu-Ni thin films one thing has to be kept in mind that is
# the dimension of underlying Copper should remain unchanged.
# Only the thickness of Ni layer over Cu is to be varied as per our requirement.
# The various Ni layer thickness used in this work are 6 Angstrom, 20 Angstrom, 50 Angstrom.
# While varying the Nickel layer thickness other two parameters for the simulations
#  (strain rate & temperature) are kept fixed.

# The in file code for creating a Cu-Ni thin film with 6 Angstrom thick Ni layer and
# subsequently indenting the same is as below.

# in file for creation of Cu-Ni thin film with Ni layer of 6 Angstrom & indentation of
# the same with a strain rate of 0.05/dt [Angstrom/ps] and temperature of 300 K.

# LAMMPS 64-bit 22Dec2022-MSMPI
#-------------------- Initialization -----------------------------------------------------
echo both
units metal

#-------------------- Atom & Lattice description ----------------------------------------

#---------------------------------------------------
# Creates a 3-Dimensional block with 2 boxes within it
#---------------------------------------------------
dimension 3
boundary p s p

atom_style atomic

region box block 0 140 0 106 0 140 units box
create_box 2 box # set 2 types (for 2 elements (Cu and Ni))
#---------------------------------------------------

#---------------------------------------------------
# Creates Copper block and groups it as substrate
#---------------------------------------------------
lattice fcc 3.61
region Cu block 0 140 0 100 0 140 units box
create_atoms 1 region Cu units box
group substrate region Cu
#---------------------------------------------------

#---------------------------------------------------
# Creates Nickel block and groups it as deposit and
# further groups the substrate and deposit as entire
#---------------------------------------------------
lattice fcc 3.52
region Ni block 0 140 100 106 0 140 units box
create_atoms 2 region Ni units box
group deposit region Ni
#
group entire union substrate deposit
#---------------------------------------------------

#-------------------- Force field --------------------------------------------------------
pair_style eam/alloy
pair_coeff * * Cu_Ni_Fischer_2018.eam.alloy Cu Ni

#-------------------- Energy Minimization ------------------------------------------------
# 0 [K], structure optimization
minimize 1.0e-3 1.0e-6 1000 1000

#-------------------- Settings -----------------------------------------------------------
reset_timestep 0

timestep 0.002 # 2 [fs]

#---------------------------------------------------
# Defines the anvil regions and group them into single name as anvil and subtracts
# it from entire, naming the rest as mobile.
#---------------------------------------------------
#Rigid boundary
#---------------------------------------------------
region 1 block 0 140 0 25 0 140 units box
group anvil1 region 1

region 2 block 0 25 0 106 0 140 units box
group anvil2 region 2

region 3 block 115 140 0 106 0 140 units box
group anvil3 region 3

group anvil union anvil1 anvil2 anvil3
group mobile subtract entire anvil
#---------------------------------------------------

#---------- output file settings -------------------
dump 1 entire atom 1000 dump.CuNi_thin_film.lammpstrj
dump_modify 1 scale no
# --------------------------------------------------
dump            d1 all cfg 1000 cfg/run.*.cfg mass type xs ys zs id type vx vy vz fx fy fz
dump_modify     d1 element Cu Ni
# --------------------------------------------------
log logCu_Ni_thinfilm.data

#---------------------------------------------------
# Initializing Velocity
#---------------------------------------------------
compute new mobile temp
velocity mobile create 300 8728007 temp new
#---------------------------------------------------

#---------------------------------------------------
# assigning velocity to the indenter in y direction---loading
#---------------------------------------------------
variable y equal "141-step*dt*0.05" # 0.05 (Loading rate)
print "y is $y"
#---------------------------------------------------

#-------------------- Run the simulation -------------------------------------------------

fix 1 mobile nvt temp 300.0 300.0 0.05

fix 2 anvil setforce 0.0 0.0 0.0

# Indenter position and radius at onset of loading
fix 3 mobile indent 1000.0 sphere 70 v_y 70 30.0 units box

thermo 100
thermo_style custom step temp c_new v_y f_3[1] f_3[2] f_3[3]

run 80000

#-------------------- End ----------------------------------------------------------------
