# 4.4 Tensile Deformation of Quenched Specimens

# To do deformation for different sizes at a particular strain rate, read data file was
# changed according to the size concerned by accessing the data in the dump file obtained after
# simulation of quenching. . Similarly, to do deformation at different strain rates for same size
# the strain rate which is mentioned as ‘erate’ in the in.file was changed accordingly.

# # In.file for 3d tensile simulation ( at strain rate 10^11 s^-1)

echo both
units metal
dimension 3
boundary p p p

atom_style atomic
read_data 5050_1crystal_3d_large_tensile.dat

timestep 0.001

pair_style eam/fs
pair_coeff * * CuZr_mm.eam.fs Cu Zr

# Energy minimization
minimize 1.0e-5 1.0e-10 10000 100000

dump 1 all atom 100 dump.uniaxialtensile8_3d_l_one_crystallites.dump.lammpstrj

log log5050_uniaxialtensile8_3d_l_one_crysatallites.dat

# initial velocities
velocity all create 298 482748 rot yes mom yes dist gaussian

Fix 1 all deform 100 y erate 0.1
fix2 all npt temp 300.0 300.0 100.0 x 0 0 100.0 z 0 0 100.0 dilate all
fix3 all temp/rescale 100 300 300 0.05 1.0

compute 1 all stress/atom

thermo 100
thermo_style custom step temp press vol etotal

dump 2 all custom 100 dump.stress_atom_uniaxialtensile8_3d_l_one_crystallites c_1[1] c_1[2] c_1[3] c_1[4] c_1[5] c_1[6]

run 1000
