#------------------------------------------------------------------------------------------
# Appendix B
# LAMMPS input scripts for reactive DPD simulations of a generic energetic material.
#------------------------------------------------------------------------------------------
# LAMMPS 64-bit 22Dec2022-MSMPI
#------------------------------------------------------------------------------------------
# NIST, Interatomic Potentials (Force Fields): https://www.ctcms.nist.gov/potentials/
#------------------------------------------------------------------------------------------
clear
echo both
#------------------------------------------------------------------------------------------
# Example for running DPD-RX
variable dtfac index 100 # dt in 0.1fs
variable t0 equal 2065
log log.dpdrx-shardlow.${dtfac}.${t0}.nph
variable dt equal 1e-4*${dtfac}
variable nsteps equal floor(1e6/${dtfac})
variable nthermo equal round(1000.0/${dtfac})

if "${nthermo} < 1" then &
  "variable nthermo equal 1"

boundary p p p
units metal # ev, ps
atom_style dpd
atom_modify map array

fix 4 all rx kinetics.dpdrx none dense lammps_rk4 1
lattice hcp 6.6520898 origin 0.0833333333333 0.25 0.25 &
  orient z 1 0 0 orient x 0 1 0 orient y 0 0 1
region box block 0 6.0 0 6.0 0.0 6.0 units lattice
create_box 2 box
region atoms block 0 6.0 0 6.0 0.0 6.0 units lattice
create_atoms 1 region atoms

comm_modify mode single vel yes
mass * 222.12

#Set concentrations
set atom * d_rdx 1.00
set atom * d_h2 0.0
set atom * d_no2 0.0
set atom * d_n2 0.0
set atom * d_hcn 0.0
set atom * d_no 0.0
set atom * d_h2o 0.0
set atom * d_co 0.0
set atom * d_co2 0.0

#Set the kinetic temperature of the particles
velocity all create ${t0} 875661 dist gaussian

#Set the internal temperature of the particles
set atom * dpd/theta ${t0}

timestep ${dt}

pair_style hybrid/overlay dpd/fdt/energy 16.00 234324 exp6/rx 16.00
pair_coeff * * dpd/fdt/energy 0.0 0.05 10.0 16.00
pair_coeff * * exp6/rx params.exp6 1fluid 1fluid 1.0 1.0 16.00

fix 1 all shardlow
fix 2 all nve
fix 3 all eos/table/rx linear table.eos 4001 KEYWORD thermo.dpdrx
fix 0 all nph iso 0.0 0.0 1.0

compute dpdU all dpd
compute dpdUatom all dpd/atom
compute crdx all property/atom d_rdx
compute crdxav all reduce ave c_crdx

variable totEnergy equal pe+ke+c_dpdU[1]+c_dpdU[2]+c_dpdU[3]+f_0

thermo ${nthermo}
thermo_style custom step time temp pe ke v_totEnergy &
  c_dpdU[1] c_dpdU[2] c_dpdU[4] c_dpdU[3] &
  c_crdxav c_dpdU[3] press vol f_0
thermo_modify format float %15.8f flush yes

run ${nsteps}

#------------------------------------------------------------------------------------------
