# Find minimum energy fcc configuration
# Required variable latconst to be input via the command line
# e.g., lmp_win_no-mpi < calc_fcc_ver1.in

# LAMMPS 64-bit 22Dec2022-MSMPI
#-------------------- Initialization -----------------------------------------------------
clear
units metal
dimension 3
boundary p p p

#-------------------- Atom & Lattice description -----------------------------------------
atom_style atomic

# method 1 (easy method)
#----------------------------------------------------------------------
#lattice fcc 3.165
#region new_region block 0 10 0 10 0 10
#create_box 1 new_region

#lattice fcc 3.165 orient x 1 0 0 orient y 0 1 0 orient z 0 0 1
#create_atoms 1 region new_region

#replicate 1 1 1
#----------------------------------------------------------------------

# method 2 (layer type)
#----------------------------------------------------------------------
#lattice fcc 3.165
region  new_region block -30 30 0 30 0 12 units box
create_box 2  new_region # set 2 elements (Fe and Ni)

region upper block   0 30 0 30 0 12 units box
lattice fcc 3.165 orient x 2 1 0 orient y 1 -2 0 orient z 0 0 -1
create_atoms 1 region upper

region lower block -30  0 0 30 0 12 units box
lattice fcc 3.5101 orient x 1 2 0 orient y 2 -1 0 orient z 0 0 -1
create_atoms 2 region lower

# creating composition using set command for 56Fe0.917-54Fe0.058 alloy -simplify->56Fe0.93-54Fe0.07
set region upper type/fraction 2 0.07 12393 # Fe upper area
set region lower type/fraction 1 0.93 12393 # Fe lower area

mass 1 56 # type1, 56Fe
mass 2 54 # type2, 54Fe

group gupper region upper # Fe in upper
group glower region lower # Fe in lower
#----------------------------------------------------------------------

#-------------------- Force field --------------------------------------------------------
pair_style eam/alloy
#pair_coeff * * FeNiCr.eam.alloy Fe # method 1
pair_coeff * * FeNiCr.eam.alloy Fe Fe

# ------------------- Displace atoms and delete overlapping atoms ------------------------
displace_atoms gupper move 0 0 0 units lattice
displace_atoms glower move 0 0 0 units lattice
delete_atoms overlap 0.35 glower gupper # or delete_atoms overlap 0.35 all all

#-------------------- Settings -----------------------------------------------------------
neighbor 2.0 bin
neigh_modify delay 0 every 10 check yes

# ------------------- Define Settings ----------------------------------------------------
compute   csym all centro/atom fcc
compute    eng all pe/atom
compute eatoms all reduce sum c_eng

replicate 1 1 1 # Extend to 1x1x1 cell

#-------------------- Energy Minimization ------------------------------------------------
# 0 [K], structure optimization
#neigh_modify every 1 delay 0 check yes

thermo 10
thermo_style custom step pe lx press pxx c_eatoms

min_style cg
minimize 1e-6 1e-6 5000 10000

# ------------------- Calculate GB Energy ------------------------------------------------
variable minimumenergy equal -3.360000 # <= Please, set this value.

variable    esum equal "v_minimumenergy * count(all)"
variable   xseng equal "c_eatoms - (v_minimumenergy * count(all))"
variable  gbarea equal "lx * lz * 2"
variable     gbe equal "(c_eatoms - (v_minimumenergy * count(all)))/v_gbarea"
variable gbemJm2 equal ${gbe}*16021.7733
variable  gbernd equal round(${gbemJm2})

print "GB energy is ${gbemJm2} mJ/m^2"

# ------------------- Equilibration ------------------------------------------------------
#reset timer
reset_timestep 0

#2 fs time step
timestep 2.0e-3 # timestep 2.0E(-15) is failed

# instrumentation and output
variable s1 equal "time"
variable s2 equal "lx"
variable s3 equal "ly"
variable s4 equal "lz"
variable s5 equal "vol"
variable s6 equal "press"
variable s7 equal "pe"
variable s8 equal "ke"
variable s9 equal "etotal"
variable s10 equal "temp"
fix writer all print 250 "${s1} ${s2} ${s3} ${s4} ${s5} ${s6} ${s7} ${s8} ${s9} ${s10}" file Fe_eq.txt screen no

# thermo
thermo 500
thermo_style custom step time cpu cpuremain lx ly lz press pe temp

# dumping trajectory
dump 1 all atom 250 dump.eq.lammpstrj

# initial velocities
velocity all create 300 12345 mom yes rot no

#-------------------- Run the simulation -------------------------------------------------
#thermostat + barostat
fix 1 all npt temp 300 300 1 iso 0 0 1 drag 1.0

run 20000 # 40 [ps], MD Simulation (assuming 2 fs time step)

#clearing fixes and dumps
unfix 1
undump 1

#saving equilibrium length for strain calculation
variable tmp equal "lx"
variable L0 equal ${tmp}
print "Initial Length, L0: ${L0}"

#------------------DEFORMATION------------------------------------------------------------
reset_timestep 0 #reset timer

timestep 0.002 # 2 [fs] time step

#nonequilibrium straining in x-direction at strain rate = 1x10^-2/dt [1/ps] = (1.0e10/1.0e12)/dt [1/s] in units metal
variable srate  equal 1.0e10
variable srate1 equal "v_srate / 1.0e12"

#instrumentation and output
#for units metal, pressure is in 1 [bars] = 100 [kPa] = 0.1 [MPa] = 1x10^-4 [GPa] => p1, p2, p3, are in GPa
#-------------------------------
variable strain equal "(lx - v_L0)/v_L0"
variable p0 equal "v_strain"
#-------------------------------
variable p1 equal "-pxx/10000"
variable p2 equal "-pyy/10000"
variable p3 equal "-pzz/10000"
#-------------------------------
variable p12 equal "-pxy/10000"
variable p23 equal "-pyz/10000"
variable p13 equal "-pxz/10000"
#-------------------------------
variable  fm equal "(v_p1+v_p2+v_p3)/3" # Hydrostatic stress
variable  fv equal "sqrt( (1/2)*( (v_p1-v_p2)^2 + (v_p2-v_p3)^2 + (v_p3-v_p1)^2 + 6*(v_p12^2+v_p23^2+v_p13^2) ) )" # Von Mises Stress
variable   t equal "v_fm/v_fv"
variable  fd equal "( (v_p1-v_fm)*(v_p2-v_fm)*(v_p3-v_fm) - ((v_p12)^2)*(v_p3-v_fm) - ((v_p23)^2)*(v_p1-v_fm) - ((v_p13)^2)*(v_p2-v_fm) + 2*(v_p12*v_p23*v_p13) )" # Deviatoric Von Mises stress
#-------------------------------
# principal stresses (dummy)
variable I1 equal "(v_p1+v_p2+v_p3)"
variable I2 equal "(v_p1)*(v_p2) + (v_p2)*(v_p3) + (v_p1)*(v_p3) - (v_p12)^2 - (v_p23)^2 - (v_p13)^2"
variable I3 equal "(v_p1)*(v_p2)*(v_p3) - (v_p1)*((v_p23)^2) - (v_p2)*((v_p13)^2) - (v_p3)*((v_p12)^2) + 2*(v_p12)*(v_p23)*(v_p13)"
variable  A equal "( acos(((2*(v_I1)^3)-9*(v_I1)*(v_I2)+27*(v_I3))/(2*((v_I1)^2-(3*(v_I2)))^(3/2))) )/3"
variable s1 equal "( (v_I1)/3)+(2/3)*( sqrt((v_I1)^2-(3*(v_I2)) ) )*cos(v_A)"
variable s2 equal "( (v_I1)/3)+(2/3)*( sqrt((v_I1)^2-(3*(v_I2)) ) )*cos((v_A)+(2*PI)/3)"
variable s3 equal "( (v_I1)/3)+(2/3)*( sqrt((v_I1)^2-(3*(v_I2)) ) )*cos((v_A)+(4*PI)/3)"
#-------------------------------

#thermo
thermo 500
thermo_style custom step cpuremain v_strain v_p1 v_p2 v_p3 press pe temp

compute 1 all stress/atom NULL  # computes the symmetric per-atom stress tensor for each atom in a group.
compute 2 all temp              # computes the temp of a group of atoms
compute 3 all reduce sum c_1[1] # reduces vector quantities of all stress tensors in x-direction and adds all the quantities to a single scalar value
compute kea all ke/atom         # This is related to temperature

variable stress     equal c_3/vol # assigns a value to the variable name stress
variable stress_GPa equal v_stress/10000 # converts the stress calculated to GPa

#---------- output file settings -------------------
fix fo1 all ave/time 1 3 3 c_2 v_strain v_stress v_stress_GPa v_p1 file stress_vs_strain.txt
#---------------------------------------------------
#dump 1 all atom 1254 dump.deform.lammpstrj #dumping standard atom trajectrories
#dump 2 all cfg 125 cfg/dump.deform_*.cfg mass type xs ys zs c_csym c_eng fx fy fz #dumping custom cfg files containing coords + ancillary variables
#dump_modify 2 element Fe
#---------------------------------------------------
dump            d1 all cfg 100 cfg/run.*.cfg mass type xs ys zs id type vx vy vz fx fy fz c_kea
dump_modify     d1 element Fe Fe
#---------------------------------------------------

# thermostat + barostat
# all atoms rescaled to new positions while temp and pressure is conserved
fix 1 all npt temp 300 300 1.0 y 0 0 1 z 0 0 1 drag 1.0

# strain rate of 0.01 [1/time units] is applied in y direction
fix 2 all deform 1 x erate ${srate1} units box remap x

# Resets the temp of atoms to 300 K by rescaling velocities after every 10 steps
#fix 3 all temp/rescale 10 ${Tdesird} ${Tdesird} 0.05 1.0

fix writer all print 125 "${p0} ${p1} ${p2} ${p3}" file Fe.deform.txt screen no

fix def all print 1 "${strain} ${p2} ${s1} ${s2} ${s3} ${fm} ${fv} ${t} ${fd}" file plot_stress_vs_strain_v3.txt screen no

# calculates the radial distribution function (RDF) and output file
compute 11 all rdf 100
fix 5 all ave/time 100 1 100 c_11[*] file data.rdf mode vector

# number of iterations is given so as to give 40% strain to the material
run 20000 # 40 [ps], MD Simulation (assuming 2 fs time step)

# clearing fixes and dumps
unfix 1
unfix 2
unfix writer
#undump 1
#undump 2
undump d1

print "Simulation is about to finish"
print "All done"
#-------------------- End ----------------------------------------------------------------

#-----------------------------------------------------------------------------------------
# Note
# compute        peratom all stress/atom NULL
# compute        p all reduce sum c_peratom[1] c_peratom[2] c_peratom[3]
# variable       press equal -(c_p[1]+c_p[2]+c_p[3])/(3*vol)
# thermo_style   custom step temp etotal press v_press
# metal unit: press = bar = 0.1 MPa, length = Angstrom = 1e-10 m
#-----------------------------------------------------------------------------------------
