# After creating simulation box with Fe atoms filled inside it we go for calculating MSD value running the code given below:
# msd calculation in Fe crystal at 50k file

units metal
boundary p p p
atom_style atomic

read_data Fe50k_void_data.txt
group Fe type 1

timestep 0.002

pair_style eam/fs
pair_coeff * * Fe_2.eam.fs Fe

# Energy Minimization
minimize 1.0e-4 1.0e-6 10000 1000000

velocity all create 50 5812775 rot yes mom yes dist gaussian

# MSD Calculation
compute 1 Fe msd

dump 1 all atom 1000 dump.Fe_msd_50K_11643_3d.dump.lammpstrj

log logFe_msd_50k_11643.data

fix 1 all npt temp 50.0 50.0 0.2 iso -1000.0 -1000.0 0.2

thermo 300
thermo_style custom step temp press vol pe ke etotal c_1[4]

run 50000
