# ----- PKA simulation for YBCO ----------------------------------------------------------
# The input files used to generate the molecular dynamics results in Chapter 6 are
# presented below. Since simulation volumes were large, a Python script was used to
# generate the repeating unit cell structure of YBCO which was saved to the "*.dat"
# files used in the LAMMPS script to define the atoms in the volume. Since the fourth
# term in the Chaplot potential (Eq. 6.5) was not pre-defined in LAMMPS, another
# Python script was used to generate a table of force/potential values manually for the
# pairwise (3,5), (4,5), and (5,5) interactions.
#-----------------------------------------------------------------------------------------
# B.1.1 MSD input file (using SRIM, MCNP5, DART, LAMMPS, VESTA and OVITO)
# YBCO = Y1Ba2Cu3O7, 10x10x4 unit cell
#-----------------------------------------------------------------------------------------
# LAMMPS 64-bit 22Dec2022-MSMPI
clear
#-------------------- Environment Settings -----------------------------------------------
variable myT equal 800 # Temperature [K]

#-------------------- Initialization -----------------------------------------------------
units metal
dimension 3
boundary p p p

#-------------------- Atom & Lattice description -----------------------------------------
atom_style charge
atom_modify map hash

#read_data YBCO_10_10_4.dat

#-------------------------------
read_data YBCO_2_2_2.dat
#-----------------------
set type 1 charge  1.9 # Y  1.9
set type 2 charge  1.5 # Ba 1.5
set type 3 charge  1.4 # Cu(1) 1.4
set type 4 charge  1.4 # Cu(2) 1.4
set type 5 charge -1.3 # O -1.3
#-----------------------
replicate 5 5 2
#-------------------------------

region inter block -17.000000 17.000000 &
                   -17.100000 17.100000 &
                   -21.380000 21.380000 units box

group interatom region inter
group outeratom subtract all interatom

compute interT interatom temp
compute   outT outeratom temp

#-------------------- Force field --------------------------------------------------------
# Effective atomic charges and radii used in the Chaplot potential for delta = 0
# Radii, R (Angstrom); Y:1.78, Ba:2.3, Cu:1.2, O:1.74
# Atomic charge, Z; Y:1.9, Ba:1.5, Cu:1.4, O:-1.3
# 1:Y, 2:Ba, 3:Cu(1), 4:Cu(2), 5:O

pair_style hybrid/overlay buck/coul/long 9.990001 9.990001 &
                          zbl 0.9 1.8 table linear 1000
#---------------------------------------------------------
pair_coeff * * buck/coul/long 1e-30 1e-30 0.0
pair_coeff 1 1 buck/coul/long 1822.0000 0.287933 0.0 # Y-Y
pair_coeff 1 2 buck/coul/long 1822.0000 0.329990 0.0 # Y-Ba
pair_coeff 1 3 buck/coul/long 1822.0000 0.241022 0.0 # Y-Cu
pair_coeff 1 4 buck/coul/long 1822.0000 0.241022 0.0 # Y-Cu
pair_coeff 1 5 buck/coul/long 1822.0000 0.284698 0.0 # Y-O
pair_coeff 2 2 buck/coul/long 1822.0000 0.372048 0.0 #Ba-Ba
pair_coeff 2 3 buck/coul/long 1822.0000 0.283080 0.0 #Ba-Cu
pair_coeff 2 4 buck/coul/long 1822.0000 0.283080 0.0 #Ba-Cu
pair_coeff 2 5 buck/coul/long 1822.0000 0.326755 0.0 #Ba-O
pair_coeff 3 3 buck/coul/long 1822.0000 0.194112 0.0 #Cu-Cu
pair_coeff 3 4 buck/coul/long 1822.0000 0.194112 0.0 #Cu-Cu
pair_coeff 3 5 buck/coul/long 1822.0000 0.237787 0.0 #Cu-O
pair_coeff 4 4 buck/coul/long 1822.0000 0.194112 0.0 #Cu-Cu
pair_coeff 4 5 buck/coul/long 1822.0000 0.237787 0.0 #Cu-O
pair_coeff 5 5 buck/coul/long 1822.0000 0.281462 0.0 # O-O
#---------------------------------------------------------
pair_coeff 1 1 zbl 39.000000 39.000000 # Y-Y
pair_coeff 1 2 zbl 39.000000 56.000000 # Y-Ba
pair_coeff 1 3 zbl 39.000000 29.000000 # Y-Cu
pair_coeff 1 4 zbl 39.000000 29.000000 # Y-Cu
pair_coeff 1 5 zbl 39.000000  8.000000 # Y-O
pair_coeff 2 2 zbl 56.000000 56.000000 #Ba-Ba
pair_coeff 2 3 zbl 56.000000 29.000000 #Ba-Cu
pair_coeff 2 4 zbl 56.000000 29.000000 #Ba-Cu
pair_coeff 2 5 zbl 56.000000  8.000000 #Ba-O
pair_coeff 3 3 zbl 29.000000 29.000000 #Cu-Cu
pair_coeff 3 4 zbl 29.000000 29.000000 #Cu-Cu
pair_coeff 3 5 zbl 29.000000  8.000000 #Cu-O
pair_coeff 4 4 zbl 29.000000 29.000000 #Cu-Cu
pair_coeff 4 5 zbl 29.000000  8.000000 #Cu-O
pair_coeff 5 5 zbl  8.000000  8.000000 # O-O
#---------------------------------------------------------
# Chaplot potential (Eq. 6.5)
pair_coeff 3 5 table Potential_35.table LS_YBCO 9.990001
pair_coeff 4 5 table Potential_45.table LS_YBCO 9.990001
pair_coeff 5 5 table Potential_55.table LS_YBCO 9.990001
#---------------------------------------------------------

kspace_style pppm 1e-4

neigh_modify delay 0 every 1 check yes

group oxygen type 5

#-------------------- Plot energy/force vs. distance r -----------------------------------
thermo 1000
thermo_style custom step pe ke press lx ly lz temp pxx pyy pzz

#-------------------- Energy Minimization ------------------------------------------------
# 0 [K], structure optimization

minimize 2e-10 1e-10 5000 10000

#-------------------- Relax. at Target Temp for 100 ps -----------------------------------
reset_timestep 0

timestep 0.001 # 1 [fs]

#---------------------------------------------------
dump            d1 all cfg 1000 cfg/run.equil.*.cfg mass type xs ys zs id type vx vy vz fx fy fz
dump_modify     d1 element Y Ba Cu Cu O
#---------------------------------------------------

velocity all create ${myT} 8200 mom yes

fix 1 all nvt temp ${myT} ${myT} 0.1

run 100000

undump d1

#-------------------- MSD ----------------------------------------------------------------
reset_timestep 0

#---------------------------------------------------
dump            d2 all cfg 1000 cfg/run.msd.*.cfg mass type xs ys zs id type vx vy vz fx fy fz
dump_modify     d2 element Y Ba Cu Cu O
#---------------------------------------------------

compute Omsd oxygen msd com yes

variable   OMSDX equal "c_Omsd[1]"
variable   OMSDY equal "c_Omsd[2]"
variable   OMSDZ equal "c_Omsd[3]"
variable OMSDAll equal "c_Omsd[4]"

thermo 1000
thermo_style custom step pe ke press lx ly lz temp c_Omsd[1] c_Omsd[2] c_Omsd[3] c_Omsd[4]

fix 2 all print 1000 "${OMSDX} ${OMSDY} ${OMSDZ} ${OMSDAll} " file MSD.data screen no

run 3000000

print "All done !"
#-------------------- End ----------------------------------------------------------------

#-----------------------------------------------------------------------------------------
# Memo
# ---------- ---------- ---------- ---------- ----------
# We can derive the Li and Na diffusion coefficients using
# the MSD data and then convert them to ionic conductivities using
# the Nernst-Einstein equation.
# MSD = 6*D*t
# where t is the simulation time, D is diffusion coeffcients.
# ---------- ---------- ---------- ---------- ----------
# This is related to the inclination when
# the vertical axis (Y-axis) is MSD (All: total^2 = dx^2 + dy^2 + dz^2)
# and the horizontal axis (x-axis) is step*dt.
# ---------- ---------- ---------- ---------- ----------
# If you want near-steady-state results, you need to run
# the simulation for a long time until it is sufficiently stable.
# ---------- ---------- ---------- ---------- ----------
# D = MSD/(6*t) = MSD (total)/(6*step*dt)
# D = [Angstrom^2/ps] => (10^-10)^2/10^-12 = 10^-8 [m^2/s]
#-----------------------------------------------------------------------------------------
