#LAMMPS Input file
# Title
clear

# ----- condition settings -----

variable    temp index 298.0 # K

variable    pres index 1.0 # 0.1 MPa (bar units)

# ----- thermal conductivity calculation settings-----
# Sample LAMMPS input script for thermal conductivity
units       metal
variable    T equal ${temp}
variable    V equal vol
variable   dt equal 0.0010  # 1.0 fs
variable    p equal 200     # correlation length
variable    s equal 10      # sample interval
variable    d equal $p*$s   # dump interval

# convert from LAMMPS real units to SI
# metal units case
variable    kB equal 1.3806504e-23    # [J/K] Boltzmann
variable    eV2J equal 1.60218e-19 # eV to J (energy)
variable    A2m equal 1.0e-10  # Angstrom to metol (length)
variable    ps2s equal 1.0e-12 # ps to s (time)
variable    convert equal ${eV2J}*${eV2J}/${ps2s}/${A2m}
# real units case
# variable    kB equal 1.3806504e-23    # [J/K] Boltzmann
# variable    kCal2J equal 4186.0/6.02214e23 # Kcal/mol to J (energy)
# variable    A2m equal 1.0e-10  # Angstrom to metol (length)
# variable    fs2s equal 1.0e-15 # fs to s (time)
# variable    convert equal ${kCal2J}*${kCal2J}/${fs2s}/${A2m}

# setup problem
atom_style   atomic  # "atom_style charge" for COMB3
dimension    3
boundary     p p p
read_data    data.in # "read_data data_comb3.in" for COMB3
replicate    4 4 4

# ----- Potential settings (MEAM)-----
# -----HEA (Co-Ni-Cr-Fe-Mn)
pair_style      meam/c
pair_coeff      * * ../potentials/meam/CoNiCrFeMn.HEA.library.meam Co Ni Cr Fe Mn ../potentials/meam/CoNiCrFeMn.HEA.meam Co Ni Cr
# -----(Al-Si-Mg-Cu-Fe)
#pair_style      meam/c
#pair_coeff      * * ../potentials/meam/Jelinek_2012_meam AlS SiS MgS CuS FeS ../potentials/meam/Jelinek_2012_meam.alsimgcufe AlS SiS MgS CuS
# -----(Fe-Mn-Si-C)
#pair_style      meam/c
#pair_coeff      * * ../potentials/meam/CFeMnSi.library.meam Fe Mn Si C ../potentials/meam/CFeMnSi.meam Fe Mn Si C
# -----(Mg-Al-Zn)
#pair_style      meam/c
#pair_coeff      * * ../potentials/meam/MgAlZn.library.meam Mg Al Zn ../potentials/meam/MgAlZn.parameter.meam Mg Al Zn
# -----(Fe-Ti-C)
#pair_style      meam/c
#pair_coeff      * * ../potentials/meam/FeTiC.library.meam Fe Ti C ../potentials/meam/FeTiC.meam Fe Ti C
# -----(V-Ni-Ti)
#pair_style      meam/c
#pair_coeff      * * ../potentials/meam/VNiTi.library.meam V Ni Ti ../potentials/meam/VNiTi.meam V Ni Ti
# -----(AgTaO3)
#pair_style      meam/c
#pair_coeff      * * ../potentials/meam/AgTaO3.library.meam Ag Ta O ../potentials/meam/AgTaO3.meam Ag Ta O

# ----- Potential settings (EAM)-----
#pair_style      eam/alloy
#pair_coeff      * * ../potentials/eam/FeNiCrCoCu-heafixed.setfl Co Ni Cr Fe
# -----(Cu-Ag-Au)
#pair_style      eam/alloy
#pair_coeff      * * ../potentials/eam/CuAgAu_Zhou04.eam.alloy Cu Ag Au
# -----(Fe-Cu-Ni)
#pair_style      eam/alloy
#pair_coeff      * * ../potentials/eam/FeCuNi.eam.alloy Fe Cu Ni
# -----(Al-Mn-Pd)
#pair_style      eam/alloy
#pair_coeff      * * ../potentials/eam/AlMnPd_Schopf_2012.lammps.EAM_CORRECT Al Mn Pd
# -----(Ni-Al-Co)
#pair_style      eam/alloy
#pair_coeff      * * ../potentials/eam/Mishin_updated-Ni-Al-Co-2013.eam.alloy Ni Al Co
# -----(Nb-Ti-Al)
#pair_style      eam/alloy
#pair_coeff      * * ../potentials/eam/Farkas_Nb-Ti-Al_1996.eam.alloy Nb Ti Al
# -----(Ni-Al-H)
#pair_style      eam/alloy
#pair_coeff      * * ../potentials/eam/NiAlH_jea.eam.alloy Ni Al H
# -----(Pd-Ag-H)
#pair_style      eam/alloy
#pair_coeff      * * ../potentials/eam/PdAgH_HybridPd3Ag.eam.alloy Pd Ag H
# -----(W-H-He)
#pair_style      eam/alloy
#pair_coeff      * * ../potentials/eam/potential-WHHe-EAM1.eam.alloy W H He
# -----(Fe-Ni-Cr) (FCC)
#pair_style      eam/fs
#pair_coeff      * * ../potentials/eam/Fe-Ni-Cr_fcc.eam.fs Fe Ni Cr
# -----(Fe-Cr-W)
#pair_style      hybrid/overlay eam/alloy eam/fs
#pair_coeff      * * eam/alloy ../potentials/eam/FeCrW_d.eam.alloy Fe Cr W
#pair_coeff      * * eam/fs    ../potentials/eam/FeCrW_s.eam.fs Fe Cr W
# -----(Ag-Au-Cu-Ni-Pd-Pt)
#pair_style      eam
#pair_coeff      1 * ../potentials/eam/DYNAMO/cuu6.txt
#pair_coeff      2 * ../potentials/eam/DYNAMO/agu6.txt
#pair_coeff      3 * ../potentials/eam/DYNAMO/auu6.txt

# https://doi.org/10.1103/physrevb.69.144113
# -----(Cr-Mn-Fe-Co-Ni), Cr and Mn are low accuracy
#pair_style      eam/alloy
#pair_coeff      * * ../potentials/eam/Zhou04/CrMnFeCoNi_Zhou04.eam.alloy Fe Co Ni
# -----(Cr-Fe-Co-Ni-Cu), Cr is low accuracy
#pair_style      eam/alloy
#pair_coeff      * * ../potentials/eam/Zhou04/CrFeCoNiCu_Zhou04.eam.alloy Co Ni Cu
# -----(Al-Cr-Fe-Co-Ni), Cr is low accuracy
#pair_style      eam/alloy
#pair_coeff      * * ../potentials/eam/Zhou04/AlCrFeCoNi_Zhou04.eam.alloy Al Fe Co Ni
# -----(Al-Ti-Fe-Co-Ni)
#pair_style      eam/alloy
#pair_coeff      * * ../potentials/eam/Zhou04/AlTiFeCoNi_Zhou04.eam.alloy Al Ti Fe
# -----(Al-Ti-V-Cr-Nb), V and Nb are low accuracy
#pair_style      eam/alloy
#pair_coeff      * * ../potentials/eam/Zhou04/AlTiVCrNb_Zhou04.eam.alloy Al Ti V
# -----(Au-Cu-Pt-Pd-Ni)
#pair_style      eam/alloy
#pair_coeff      * * ../potentials/eam/Zhou04/AuCuPtPdNi_Zhou04.eam.alloy Au Cu Pt
# -----(Ti-Zr-Hf-Nb-Ta), Hf and Nb are low accuracy
#pair_style      eam/alloy
#pair_coeff      * * ../potentials/eam/Zhou04/TiZrHfNbTa_Zhou04.eam.alloy Ti Zr Ta
# -----(V-Nb-Mo-Fe-Ni), V and Nb are low accuracy
#pair_style      eam/alloy
#pair_coeff      * * ../potentials/eam/Zhou04/VNbMoFeNi_Zhou04.eam.alloy Mo Fe Ni

# ----- Potential settings (ADP)-----
#pair_style      adp
#pair_coeff      * * ../potentials/adp/Si_Au_Al.adp.txt Si Au Al

# ----- Potential settings (EIM)-----
#pair_style      eim
#pair_coeff      * * Li Na K Rb Cs F Cl Br Id ../potentials/eim/BrClCsFIKLiNaRb.ffield.eim F Li Na

# ----- Potential settings (COMB)-----
#pair_style      comb3 polar_off
#pair_coeff      * * ../potentials/comb3/ffield.comb3.NiAlO Ni Al O
#fix             q2 all qeq/comb 10 1.0e-3 # file fq.out
# -----(OCuNCHTiZnZr)
#pair_style      comb3 polar_off
#pair_coeff      * * ../potentials/comb3/ffield.comb3.OCuNCHTiZnZr Cu Zn O
#fix             q2 all qeq/comb 10 1.0e-3 # file fq.out

# ----- Potential settings (BOP)-----
#pair_style      bop
#pair_coeff      * * ../potentials/bop/CdZnTe_v2.bop.table Cd Zn Te
#comm_modify cutoff 14.70

# ----- Potential settings (SW)-----
#pair_style      sw
#pair_coeff      * * ../potentials/sw/InGaN.psw In Ga N
# -----(Cd-Te-Zn-Se-Hg-S)
#pair_style      sw
#pair_coeff      * * ../potentials/sw/CdTeZnSeHgS0.sw Cd Te Zn

# Need to set mass to something, just to satisfy LAMMPS (COMB, BOP, SW or tersoff)
#mass 1 58.933 # Co
#mass 2 58.690 # Ni
#mass 3 51.960 # Cr

# ----- Potential settings (tersoff)-----
#pair_style      tersoff
#pair_coeff      * * ./tersoff/BNC.tersoff B N C

timestep     ${dt}
thermo       $d

# pre process
fix          f1 all box/relax iso 0.0
minimize     1.0e-10 0.0 1000 100000
unfix        f1

# output file
dump            d1 all cfg 100 cfg/run.*.cfg mass type xs ys zs id type
dump_modify     d1 element Co Ni Cr
#dump_modify     d1 element Al Si Mg Cu   # Al-Si-Mg-Cu-Fe
#dump_modify     d1 element Fe Mn Si C   # Fe-Mn-Si-C
variable     energy equal etotal
variable     temperature equal temp
fix          f1 all ave/time 1 100 100 v_energy v_temperature file out_energy.txt

# equilibration and thermalization
velocity     all create $T 123456
fix          NPT all npt temp $T $T $(100.0*dt) iso 0.0 ${pres} $(1000.0*dt)
run          8000
unfix        NPT
#
fix          NVT all nvt temp $T $T $(100.0*dt)

# ----- Radial Distribution Function -----
#comm_modify  cutoff 14
compute      distribution all rdf 240
fix          f1 all ave/time 1 1000 3000 c_distribution[*] file out_rdf.txt mode vector

# ----- Mean Square Displacement -----
group           Co type 1
compute         Comsd Co msd
fix             f2 all ave/time 1 1 5 c_Comsd[*] file out_Co_msd.txt
# -----
group           Ni type 2
compute         Nimsd Ni msd
fix             f3 all ave/time 1 1 5 c_Nimsd[*] file out_Ni_msd.txt
# -----
group           Cr type 3
compute         Crmsd Cr msd
fix             f4 all ave/time 1 1 5 c_Crmsd[*] file out_Cr_msd.txt
# -----
compute         allmsd all msd
fix             f5 all ave/time 1 1 5 c_allmsd[*] file out_all_msd.txt

fix             f6 all nvt temp ${temp} ${temp} $(100.0*dt)
run             3000
unfix        f1
unfix        f2
unfix        f3
unfix        f4
unfix        f5
unfix        f6

# thermal conductivity calculation, switch to NVE if desired
unfix        NVT
fix          NVE all nve

reset_timestep 0
compute      myKE all ke/atom
compute      myPE all pe/atom
compute      myStress all stress/atom NULL virial
compute      flux all heat/flux myKE myPE myStress
variable     Jx equal c_flux[1]/vol
variable     Jy equal c_flux[2]/vol
variable     Jz equal c_flux[3]/vol
fix          JJ all ave/correlate $s $p $d &
             c_flux[1] c_flux[2] c_flux[3] type auto file J0Jt.dat ave running
variable     scale equal ${convert}/${kB}/$T/$T/$V*$s*${dt}
variable     k11 equal trap(f_JJ[3])*${scale}
variable     k22 equal trap(f_JJ[4])*${scale}
variable     k33 equal trap(f_JJ[5])*${scale}
thermo_style custom step temp v_Jx v_Jy v_Jz v_k11 v_k22 v_k33
run          100000
variable     kappa equal (v_k11+v_k22+v_k33)/3.0
variable     ndens equal count(all)/vol
print        "average conductivity: ${kappa} [W/mK] @ $T K, ${ndens} /A^3"

# ----- Output restart data -----
write_data data.in.restart
