#LAMMPS Input file
# Title
clear

# ----- condition settings -----

variable    temp index 298.0 # K

variable    pres index 1.0 # 0.1 MPa (bar units)

# ----- thermal conductivity calculation settings-----
# Sample LAMMPS input script for thermal conductivity
units       metal
variable    T equal ${temp}
variable    V equal vol
variable   dt equal 0.0010  # 1.0 fs
variable    p equal 200     # correlation length
variable    s equal 10      # sample interval
variable    d equal $p*$s   # dump interval

# convert from LAMMPS real units to SI
# metal units case
variable    kB equal 1.3806504e-23    # [J/K] Boltzmann
variable    eV2J equal 1.60218e-19 # eV to J (energy)
variable    A2m equal 1.0e-10  # Angstrom to metol (length)
variable    ps2s equal 1.0e-12 # ps to s (time)
variable    convert equal ${eV2J}*${eV2J}/${ps2s}/${A2m}
# real units case
# variable    kB equal 1.3806504e-23    # [J/K] Boltzmann
# variable    kCal2J equal 4186.0/6.02214e23 # Kcal/mol to J (energy)
# variable    A2m equal 1.0e-10  # Angstrom to metol (length)
# variable    fs2s equal 1.0e-15 # fs to s (time)
# variable    convert equal ${kCal2J}*${kCal2J}/${fs2s}/${A2m}

# setup problem
atom_style   atomic
dimension    3
boundary     p p p
read_data    data.in
replicate    4 4 4

# ----- Potential settings (MEAM)-----
# -----HEA (Co-Ni-Cr-Fe-Mn)
#pair_style      meam/c
#pair_coeff      * * ../potentials/meam/CoNiCrFeMn.HEA.library.meam Co Ni Cr Fe Mn ../potentials/meam/CoNiCrFeMn.HEA.meam Co Ni Cr Fe
# -----(Al-Si-Mg-Cu-Fe)
#pair_style      meam/c
#pair_coeff      * * ../potentials/meam/Jelinek_2012_meam AlS SiS MgS CuS FeS ../potentials/meam/Jelinek_2012_meam.alsimgcufe AlS SiS MgS CuS
# -----(Fe-Mn-Si-C)
#pair_style      meam/c
#pair_coeff      * * ../potentials/meam/CFeMnSi.library.meam Fe Mn Si C ../potentials/meam/CFeMnSi.meam Fe Mn Si C

# ----- Potential settings (EAM)-----
# -----(Co-Ni-Cr-Fe-Cu)
#pair_style      eam/alloy
#pair_coeff      * * ../potentials/eam/FeNiCrCoCu-heafixed.setfl Co Ni Cr Fe
# -----(Fe-Ni-Cr-Co-Al)
#pair_style      eam/alloy
#pair_coeff      * * ../potentials/eam/FeNiCrCoAl-heaweight.setfl Fe Ni Cr Co Al
# -----(Ta-Hf-Zr-Ti)
#pair_style      eam/fs
#pair_coeff      * * ../potentials/eam/TaHfZrTi.eam.fs Ta Hf Zr Ti
# -----(Ag-Au-Cu-Ni-Pd-Pt)
#pair_style      eam
#pair_coeff      1 * ../potentials/eam/DYNAMO/cuu6.txt
#pair_coeff      2 * ../potentials/eam/DYNAMO/agu6.txt
#pair_coeff      3 * ../potentials/eam/DYNAMO/auu6.txt
#pair_coeff      4 * ../potentials/eam/DYNAMO/niu6.txt

# https://doi.org/10.1103/physrevb.69.144113
# -----(Cr-Mn-Fe-Co-Ni), Cr and Mn are low accuracy
#pair_style      eam/alloy
#pair_coeff      * * ../potentials/eam/Zhou04/CrMnFeCoNi_Zhou04.eam.alloy Cr Fe Co Ni
# -----(Cr-Fe-Co-Ni-Cu), Cr is low accuracy
#pair_style      eam/alloy
#pair_coeff      * * ../potentials/eam/Zhou04/CrFeCoNiCu_Zhou04.eam.alloy Fe Co Ni Cu
# -----(Al-Cr-Fe-Co-Ni), Cr is low accuracy
#pair_style      eam/alloy
#pair_coeff      * * ../potentials/eam/Zhou04/AlCrFeCoNi_Zhou04.eam.alloy Al Fe Co Ni
# -----(Al-Ti-Fe-Co-Ni)
#pair_style      eam/alloy
#pair_coeff      * * ../potentials/eam/Zhou04/AlTiFeCoNi_Zhou04.eam.alloy Al Ti Fe Co
# -----(Al-Ti-V-Cr-Nb), V and Nb are low accuracy
#pair_style      eam/alloy
#pair_coeff      * * ../potentials/eam/Zhou04/AlTiVCrNb_Zhou04.eam.alloy Al Ti V Nb
# -----(Au-Cu-Pt-Pd-Ni)
#pair_style      eam/alloy
#pair_coeff      * * ../potentials/eam/Zhou04/AuCuPtPdNi_Zhou04.eam.alloy Au Cu Pt Pd
# -----(Ti-Zr-Hf-Nb-Ta), Hf and Nb are low accuracy
#pair_style      eam/alloy
#pair_coeff      * * ../potentials/eam/Zhou04/TiZrHfNbTa_Zhou04.eam.alloy Ti Zr Nb Ta
# -----(V-Nb-Mo-Fe-Ni), V and Nb are low accuracy
#pair_style      eam/alloy
#pair_coeff      * * ../potentials/eam/Zhou04/VNbMoFeNi_Zhou04.eam.alloy V Mo Fe Ni

# ----- Potential settings (EIM)-----
#pair_style      eim
#pair_coeff      * * Li Na K Rb Cs F Cl Br Id ../potentials/eim/BrClCsFIKLiNaRb.ffield.eim F K Li Na

timestep     ${dt}
thermo       $d

# pre process
fix          f1 all box/relax iso 0.0
minimize     1.0e-10 0.0 1000 100000
unfix        f1

# output file
dump            d1 all cfg 100 cfg/run.*.cfg mass type xs ys zs id type
dump_modify     d1 element Co Ni Cr Fe
#dump_modify     d1 element Al Si Mg Cu   # Al-Si-Mg-Cu-Fe
#dump_modify     d1 element Fe Mn Si C   # Fe-Mn-Si-C
variable     energy equal etotal
variable     temperature equal temp
fix          f1 all ave/time 1 100 100 v_energy v_temperature file out_energy.txt

# equilibration and thermalization
velocity     all create $T 123456
fix          NPT all npt temp $T $T $(100.0*dt) iso 0.0 ${pres} $(1000.0*dt)
run          8000
unfix        NPT
#
fix          NVT all nvt temp $T $T $(100.0*dt)

# ----- Radial Distribution Function -----
#comm_modify  cutoff 14
compute      distribution all rdf 240
fix          f1 all ave/time 1 1000 3000 c_distribution[*] file out_rdf.txt mode vector

# ----- Mean Square Displacement -----
group           Co type 1
compute         Comsd Co msd
fix             f2 all ave/time 1 1 5 c_Comsd[*] file out_Co_msd.txt
# -----
group           Ni type 2
compute         Nimsd Ni msd
fix             f3 all ave/time 1 1 5 c_Nimsd[*] file out_Ni_msd.txt
# -----
group           Cr type 3
compute         Crmsd Cr msd
fix             f4 all ave/time 1 1 5 c_Crmsd[*] file out_Cr_msd.txt
# -----
group           Fe type 4
compute         Femsd Fe msd
fix             f5 all ave/time 1 1 5 c_Femsd[*] file out_Fe_msd.txt
# -----
compute         allmsd all msd
fix             f6 all ave/time 1 1 5 c_allmsd[*] file out_all_msd.txt

fix             f7 all nvt temp ${temp} ${temp} $(100.0*dt)
run             3000
unfix        f1
unfix        f2
unfix        f3
unfix        f4
unfix        f5
unfix        f6
unfix        f7

# thermal conductivity calculation, switch to NVE if desired
unfix        NVT
fix          NVE all nve

reset_timestep 0
compute      myKE all ke/atom
compute      myPE all pe/atom
compute      myStress all stress/atom NULL virial
compute      flux all heat/flux myKE myPE myStress
variable     Jx equal c_flux[1]/vol
variable     Jy equal c_flux[2]/vol
variable     Jz equal c_flux[3]/vol
fix          JJ all ave/correlate $s $p $d &
             c_flux[1] c_flux[2] c_flux[3] type auto file J0Jt.dat ave running
variable     scale equal ${convert}/${kB}/$T/$T/$V*$s*${dt}
variable     k11 equal trap(f_JJ[3])*${scale}
variable     k22 equal trap(f_JJ[4])*${scale}
variable     k33 equal trap(f_JJ[5])*${scale}
thermo_style custom step temp v_Jx v_Jy v_Jz v_k11 v_k22 v_k33
run          100000
variable     kappa equal (v_k11+v_k22+v_k33)/3.0
variable     ndens equal count(all)/vol
print        "average conductivity: ${kappa} [W/mK] @ $T K, ${ndens} /A^3"

# ----- Output restart data -----
write_data data.in.restart
